** written by FreeCAD inp file writer for CalculiX,Abaqus meshes
** highest dimension mesh elements only.

** Nodes
*Node, NSET=Nall
1, 0, 10, 100
2, 0, 10, 0
3, 10, 10, 100
4, 10, 10, 0
5, 10, 0, 100
6, 10, 0, 0
7, 0, 0, 100
8, 0, 0, 0
9, 0, 10, 10.6
10, 0, 10, 21.3
11, 0, 10, 32.8
12, 0, 10, 43.9
13, 0, 10, 55.7
14, 0, 10, 66.9
15, 0, 10, 78.1
16, 0, 10, 89.3
17, 0, 0, 11.2
18, 0, 0, 22.3
19, 0, 0, 33.4
20, 0, 0, 44.5
21, 0, 0, 55.6
22, 0, 0, 66.7
23, 0, 0, 77.8
24, 0, 0, 88.9
25, 10, 10, 10.6
26, 10, 10, 21.3
27, 10, 10, 32.8
28, 10, 10, 43.9
29, 10, 10, 55.7
30, 10, 10, 66.9
31, 10, 10, 78.1
32, 10, 10, 89.3
33, 10, 0, 11.3
34, 10, 0, 22.6
35, 10, 0, 33.1
36, 10, 0, 44.4
37, 10, 0, 55.7
38, 10, 0, 66.8
39, 10, 0, 77.5
40, 10, 0, 88.8
41, 5.003167599706, 5.003095815145, 94.54457255371
42, 5, 0, 100
43, 10, 5, 100
44, 5, 10, 100
45, 0, 5, 100
46, 5, 0, 0
47, 10, 5, 0
48, 5, 10, 0
49, 0, 5, 0
50, 0, 10, 5.3
51, 0, 10, 15.95
52, 0, 10, 27.05
53, 0, 10, 38.35
54, 0, 10, 49.8
55, 0, 10, 61.3
56, 0, 10, 72.5
57, 0, 10, 83.7
58, 0, 10, 94.65
59, 0, 0, 5.6
60, 0, 0, 16.75
61, 0, 0, 27.85
62, 0, 0, 38.95
63, 0, 0, 50.05
64, 0, 0, 61.15
65, 0, 0, 72.25
66, 0, 0, 83.35
67, 0, 0, 94.45
68, 10, 10, 5.3
69, 10, 10, 15.95
70, 10, 10, 27.05
71, 10, 10, 38.35
72, 10, 10, 49.8
73, 10, 10, 61.3
74, 10, 10, 72.5
75, 10, 10, 83.7
76, 10, 10, 94.65
77, 10, 0, 5.65
78, 10, 0, 16.95
79, 10, 0, 27.85
80, 10, 0, 38.75
81, 10, 0, 50.05
82, 10, 0, 61.25
83, 10, 0, 72.15
84, 10, 0, 83.15
85, 10, 0, 94.4
86, 5, 5, 100
87, 5, 5, 0
88, 0, 5, 5.3
89, 0, 5, 10.9
90, 0, 5, 16.25
91, 0, 5, 21.8
92, 0, 5, 27.55
93, 0, 5, 33.1
94, 0, 5, 38.65
95, 0, 5, 44.2
96, 0, 5, 50.1
97, 0, 5, 61.2
98, 0, 5, 66.8
99, 0, 5, 72.35
100, 0, 5, 77.95
101, 0, 5, 83.5
102, 0, 5, 89.1
103, 0, 5, 94.65
104, 0, 5, 55.65
105, 5, 10, 5.3
106, 5, 10, 10.6
107, 5, 10, 15.95
108, 5, 10, 21.3
109, 5, 10, 27.05
110, 5, 10, 32.8
111, 5, 10, 38.35
112, 5, 10, 43.9
113, 5, 10, 49.8
114, 5, 10, 55.7
115, 5, 10, 61.3
116, 5, 10, 66.9
117, 5, 10, 72.5
118, 5, 10, 78.1
119, 5, 10, 83.7
120, 5, 10, 94.65
121, 5, 10, 89.3
122, 10, 5, 5.3
123, 10, 5, 10.95
124, 10, 5, 16.3
125, 10, 5, 21.95
126, 10, 5, 27.7
127, 10, 5, 32.95
128, 10, 5, 38.5
129, 10, 5, 44.15
130, 10, 5, 50.05
131, 10, 5, 55.7
132, 10, 5, 61.25
133, 10, 5, 66.85
134, 10, 5, 72.2
135, 10, 5, 77.8
136, 10, 5, 83.45
137, 10, 5, 89.05
138, 10, 5, 94.65
139, 5, 0, 5.6
140, 5, 0, 11.25
141, 5, 0, 16.8
142, 5, 0, 22.45
143, 5, 0, 28
144, 5, 0, 38.9
145, 5, 0, 44.45
146, 5, 0, 50
147, 5, 0, 55.65
148, 5, 0, 61.2
149, 5, 0, 72.1
150, 5, 0, 77.65
151, 5, 0, 83.3
152, 5, 0, 88.85
153, 5, 0, 94.45
154, 5, 0, 33.25
155, 5, 0, 66.75
156, 5, 5, 27.7
157, 5, 5, 21.95
158, 5, 5, 83.45
159, 5, 5, 89.05
160, 5, 5, 72.2
161, 5, 5, 77.8
162, 5, 5, 16.3
163, 5, 5, 5.3
164, 5, 5, 66.8
165, 5, 5, 10.95
166, 5, 5, 32.95
167, 5, 5, 61.2
168, 5, 5, 50.1
169, 5, 5, 55.65
170, 2.501583799853, 2.501547907573, 97.27228627685
171, 2.501583799853, 7.501547907573, 97.27228627685
172, 7.501583799853, 7.501547907573, 97.27228627685
173, 2.501583799853, 7.501547907573, 91.92228627685
174, 2.501583799853, 2.501547907573, 91.72228627685
175, 7.501583799853, 7.501547907573, 91.92228627685
176, 5, 5, 44.2
177, 5, 5, 38.65
178, 7.501583799853, 2.501547907573, 97.27228627685
179, 7.501583799853, 2.501547907573, 91.67228627685


** Volume elements
*Element, TYPE=C3D10, ELSET=Evolumes
121, 34, 18, 11, 10, 142, 92, 156, 157, 91, 52
122, 32, 40, 15, 31, 137, 158, 119, 75, 136, 118
123, 40, 32, 15, 16, 137, 119, 158, 159, 121, 57
124, 14, 31, 15, 39, 117, 118, 56, 160, 135, 161
125, 10, 34, 33, 26, 157, 78, 162, 108, 125, 124
126, 2, 25, 9, 6, 105, 106, 50, 87, 122, 163
127, 6, 8, 9, 2, 46, 88, 163, 87, 49, 50
128, 39, 30, 22, 14, 134, 164, 149, 160, 116, 98
129, 10, 33, 17, 9, 162, 140, 90, 51, 165, 89
130, 24, 40, 23, 15, 152, 151, 66, 101, 158, 100
131, 14, 31, 39, 30, 117, 135, 160, 116, 74, 134
132, 35, 34, 19, 11, 79, 143, 154, 166, 156, 93
133, 22, 38, 37, 29, 155, 82, 148, 167, 132, 131
134, 27, 10, 26, 34, 109, 108, 70, 126, 157, 125
135, 26, 33, 9, 25, 124, 165, 107, 69, 123, 106
136, 2, 25, 6, 4, 105, 122, 87, 48, 68, 47
137, 39, 14, 23, 15, 160, 99, 150, 161, 56, 100
138, 30, 38, 22, 29, 133, 155, 164, 73, 132, 167
139, 20, 29, 21, 36, 168, 169, 63, 145, 130, 146
140, 39, 40, 15, 23, 84, 158, 161, 150, 151, 100
141, 18, 10, 33, 17, 91, 162, 141, 60, 90, 140
142, 39, 22, 30, 38, 149, 164, 134, 83, 155, 133
143, 36, 37, 29, 21, 81, 131, 130, 146, 147, 169
144, 22, 21, 29, 37, 64, 169, 167, 148, 147, 131
145, 39, 15, 40, 31, 161, 158, 84, 135, 118, 136
146, 26, 10, 9, 33, 108, 51, 107, 124, 162, 165
147, 10, 33, 34, 18, 162, 78, 157, 91, 141, 142
148, 1, 7, 41, 3, 45, 170, 171, 44, 86, 172
149, 6, 8, 17, 9, 46, 59, 139, 163, 88, 89
150, 34, 35, 27, 11, 79, 127, 126, 156, 166, 110
151, 27, 10, 34, 11, 109, 157, 126, 110, 52, 156
152, 34, 18, 19, 11, 142, 61, 143, 156, 92, 93
153, 9, 6, 33, 17, 163, 77, 165, 89, 139, 140
154, 14, 22, 39, 23, 98, 149, 160, 99, 65, 150
155, 20, 29, 13, 21, 168, 114, 96, 63, 169, 104
156, 9, 33, 6, 25, 165, 77, 163, 106, 123, 122
157, 20, 29, 12, 13, 168, 113, 95, 96, 114, 54
158, 7, 16, 1, 41, 103, 58, 45, 170, 173, 171
159, 24, 16, 7, 41, 102, 103, 67, 174, 173, 170
160, 1, 16, 32, 41, 58, 121, 120, 171, 173, 175
161, 28, 20, 19, 36, 176, 62, 177, 129, 145, 144
162, 5, 24, 41, 40, 153, 174, 178, 85, 152, 179
163, 1, 32, 3, 41, 120, 76, 44, 171, 175, 172
164, 11, 28, 12, 19, 111, 112, 53, 93, 177, 94
165, 24, 40, 15, 16, 152, 158, 101, 102, 159, 57
166, 24, 7, 5, 41, 67, 42, 153, 174, 170, 178
167, 5, 41, 32, 40, 178, 175, 138, 85, 179, 137
168, 27, 35, 28, 11, 127, 128, 71, 110, 166, 111
169, 40, 16, 41, 32, 159, 173, 179, 137, 121, 175
170, 28, 20, 12, 19, 176, 95, 112, 177, 62, 94
171, 28, 20, 29, 12, 176, 168, 72, 112, 95, 113
172, 3, 5, 7, 41, 43, 42, 86, 172, 178, 170
173, 28, 20, 36, 29, 176, 145, 129, 72, 168, 130
174, 29, 30, 13, 22, 73, 115, 114, 167, 164, 97
175, 14, 22, 13, 30, 98, 97, 55, 116, 164, 115
176, 36, 28, 35, 19, 129, 128, 80, 144, 177, 154
177, 22, 21, 13, 29, 64, 104, 97, 167, 169, 114
178, 41, 16, 40, 24, 173, 159, 179, 174, 102, 152
179, 28, 35, 19, 11, 128, 154, 177, 111, 166, 93
180, 5, 32, 41, 3, 138, 175, 178, 43, 76, 172

** Define element set Eall
*ELSET, ELSET=Eall
Evolumes


***********************************************************
** Element sets for materials and FEM element type (solid, shell, beam, fluid)
*ELSET,ELSET=MaterialSolidSolid
Evolumes

***********************************************************
** constraints displacement node sets
** ConstraintDisplacement
*NSET,NSET=ConstraintDisplacement
2,
4,
6,
8,
46,
47,
48,
49,
87,
** ConstraintDisplacement001
*NSET,NSET=ConstraintDisplacement001
6,
8,
46,
** ConstraintDisplacement002
*NSET,NSET=ConstraintDisplacement002
8,

** Physical constants for SI(mm) unit system with Kelvins
*PHYSICAL CONSTANTS, ABSOLUTE ZERO=0, STEFAN BOLTZMANN=5.670374419e-11

***********************************************************
** Materials
** see information about units at file end
** FreeCAD material name: CalculiX-Steel
** MaterialSolid
*MATERIAL, NAME=MaterialSolid
*ELASTIC
210000,0.3

***********************************************************
** Sections
*SOLID SECTION, ELSET=MaterialSolidSolid, MATERIAL=MaterialSolid

***********************************************************
** At least one step is needed to run an CalculiX analysis of FreeCAD
*STEP, NLGEOM, INC=2000
*STATIC, SOLVER=SPOOLES


***********************************************************
** Displacement constraint applied
** ConstraintDisplacement
*BOUNDARY
ConstraintDisplacement,3,3,0.0
** ConstraintDisplacement001
*BOUNDARY
ConstraintDisplacement001,2,2,0.0
** ConstraintDisplacement002
*BOUNDARY
ConstraintDisplacement002,1,1,0.0


***********************************************************
** constraints force node loads
*CLOAD
** ConstraintForce
** node loads on shape: Pad:Edge10
1,2,-333.3333333333
3,2,-333.3333333333
44,2,-1333.333333333


***********************************************************
** Outputs --> frd file
*NODE FILE
U
*EL FILE
S, E
** outputs --> dat file
** reaction forces for Constraint displacement constraining translation
*NODE PRINT, NSET=ConstraintDisplacement, TOTALS=ONLY
RF
*NODE PRINT, NSET=ConstraintDisplacement001, TOTALS=ONLY
RF
*NODE PRINT, NSET=ConstraintDisplacement002, TOTALS=ONLY
RF

*OUTPUT, FREQUENCY=1
***********************************************************
*END STEP

***********************************************************
** CalculiX Input file
**   written by    --> FreeCAD 1.0.2
**   written on    --> Wed Feb 18 14:13:49 2026
**   file name     --> A111_10x10.FCStd
**   analysis name --> Analysis
**
**
***********************************************************
**  About units:
**  See ccx manual, ccx does not know about any unit.
**  Golden rule: The user must make sure that the numbers they provide have consistent units.
**  The user is the FreeCAD calculix writer module ;-)
**
**  The unit system which is used at Guido Dhondt's company: mm, N, s, K
**  Since Length and Mass are connected by Force, if Length is mm the Mass is in t to get N
**  The following units are used to write to inp file:
**
**  Length: mm (this includes the mesh geometry)
**  Mass: t
**  TimeSpan: s
**  Temperature: K
**
**  This leads to:
**  Force: N
**  Pressure: N/mm^2 == MPa (Young's Modulus has unit Pressure)
**  Density: t/mm^3
**  Gravity: mm/s^2
**  Thermal conductivity: t*mm/K/s^3 == as W/m/K == kW/mm/K
**  Specific Heat: mm^2/s^2/K = J/kg/K == kJ/t/K
**
